Vin := 36
Vout := 12
Fcomin := 50000
Fcomax := 100000
L := 0.0001
C := 0.0001
Pout := 100
# 1. Calculo dos períodos mínimos e máximos
Tsmin := 1/Fcomin = 2e-5
Tsmax := 1/Fcomax = 1e-5
# 2. Calculo da Razão Cíclica
D := Vout/Vin = 0.333333
# 3. Calculo dos intervalos de condução () e bloqueio ()
Tonfmin := D*Tsmin = 6.66667e-6
Tonfmax := D*Tsmax = 3.33333e-6
# 4. Calculo da Ondulação Mínima de corrente no Indutor
deltaILmin := (Vin - Vout)/(L*Fcomin)*D = 1.6
deltaILmax := (Vin - Vout)/(L*Fcomax)*D = 0.8
# 5. Calculo da corrente de saída
Iout := Pout/Vout = 8.33333
# 6. Calculo da Resistência de saída
Rout := Vout/Iout = 1.44
Rout := Pout/Iout^2 = 1.44
# 7. Calculo da Ondulação Mínima de tensão no capacitor
deltaVcmin := Vin/(31*L*C*Fcomin^2) = 0.0464516
deltaVcmax := Vin/(31*L*C*Fcomax^2) = 0.0116129
# 8. Calculo da Freqüência de Corte
Fcorte := 1/(2*3.14*sqrt((L*C))) = 1592.36
# 9. Valor Máximo da Corrente no Indutor
IL := Iout = 8.33333
ILmaxfmin := IL + deltaILmin/2 = 9.13333
ILmaxfmax := IL + deltaILmax/2 = 8.73333
# 10. Valor Eficaz da Corrente no Capacitor
ICeffmin := deltaILmin/(2*sqrt(3)) = 0.46188
ICeffmax := deltaILmax/(2*sqrt(3)) = 0.23094
# 11. Valor Máximo da Corrente no Capacitor
ICmaxfmin := deltaILmin/2 = 0.8
ICmaxfmin := deltaILmax/2 = 0.4
# 12. Valor Eficaz da Corrente no Indutor
ILeffmin := sqrt(ICeffmin^2 + Iout^2) = 8.34612
ILeffmax := sqrt(ICeffmax^2 + Iout^2) = 8.33653
# 13. Tensão Máxima na Mosfet
Vs := Vin = 36
# 14. Corrente Máxima na Mosfet
Is := Iout = 8.33333
# 15. Corrente Média no Mosfet
Ismed := D*Iout = 2.77778
# 16. Corrente Eficaz  no Mosfet
Iseffmin := 1/2*sqrt(D/3*(12*Iout^2 + deltaILmin^2)) = 4.81864
Iseffmax := 1/2*sqrt(D/3*(12*Iout^2 + deltaILmax^2)) = 4.8131
# 17. Tensão Máxima no Diodo
VD := Vin = 36
# 18. Corrente Máxima no Diodo
IDmaxfmin := ILmaxfmin = 9.13333
IDmaxfmax := ILmaxfmax = 8.73333
# 19. Corrente Média no Diodo
IDmed := (1 - D)*Iout = 5.55556
# 20. Corrente Eficaz no Diodo
IDeffim := 1/2*sqrt(((1 - D)*(12*Iout^2 + deltaILmin^2))/3) = 6.81458
IDeffmax := 1/2*sqrt(((1 - D)*(12*Iout^2 + deltaILmax^2))/3) = 6.80675
